<?xml version="1.0"?>
<!--
  Name:     F100-PW-220
  File:     F100-PW-220.xml
  Author:   Richard Harrison (rjh@zaretto.com)
  Date:     13 December 2014

  Pratt & Whitney F100-PW-220 afterburning low-bypass turbofan engine.
  Powers the F-15C/D Eagle (two engines per aircraft).

  Published specifications (F100-PW-220):
    Military (intermediate) thrust:  14,590 lbf (64.9 kN)
    Maximum (afterburning) thrust:   23,770 lbf (105.7 kN)
    Bypass ratio:                    0.36:1
    Overall pressure ratio:          25:1
    TSFC (military):                 0.73 lb/(lbf.h)
    TSFC (max afterburner):          1.94 lb/(lbf.h)
    Mass flow:                       228 lb/s
    Dry weight:                      3,234 lb
    Length:                          191 in
    Max diameter:                    46.5 in

  Modelling approach
  ==================
  JSBSim FGTurbine thrust formulas (from FGTurbine.cpp):
    Idle:       thrust_idle = milthrust_scalar * IdleTable(mach, alt)
    Military:   thrust = thrust_idle + (milthrust_scalar - thrust_idle) * MilTable(mach, alt)
    Afterburner: thrust = maxthrust_scalar * AugTable(mach, alt)

  The MilThrust and AugThrust tables are normalised so that the Mach 0 / sea-level
  entry produces the published rated static thrust when combined with the scalar
  values above. i.e. MilTable(0,0) = 1.0 and AugTable(0,0) = 1.0.

  Thrust variation with Mach and altitude is modelled using corrected-thrust
  thermodynamic principles for a low-bypass-ratio turbofan:

    1. Total pressure at the engine face:
         Pt2 = P_ambient * (1 + 0.2*M^2)^3.5 * eta_inlet(M)
       where eta_inlet is the F-15 variable-geometry inlet pressure recovery.

    2. Total temperature at the engine face:
         Tt2 = T_ambient * (1 + 0.2*M^2)

    3. Military thrust scales as corrected thrust:
         T_mil / T_mil_SLS ~ Pt2 / sqrt(Tt2)
       with engine limiting (compressor surge margin and turbine temperature
       limits) applied as a soft cap when corrected thrust exceeds ~1.45.
       Temperature derating reduces the limit at high inlet temperatures
       (high Mach / low altitude) to model TIT-limited operation.

    4. Afterburner thrust scales similarly but is less temperature-sensitive
       (the afterburner adds a fixed enthalpy rise regardless of inlet temp):
         T_aug / T_aug_SLS ~ Pt2 / Tt2^0.35
       with a higher soft cap (~1.55) reflecting the AB's ability to extract
       more energy from high-ram conditions.

    5. The F-15 variable-geometry inlet provides excellent pressure recovery
       subsonically (eta=1.0) with gradual degradation supersonically,
       modelled as: eta = 1.0 - 0.075*(M-1.0)^1.35 for M > 1.0

  The resulting AB/Mil thrust ratio increases smoothly from ~1.63 at static
  to ~1.85 at Mach 2.5, which is consistent with published data for low-BPR
  afterburning turbofans.

  Validation
  ==========
  - Sea level static: Mil = 14,590 lbs, AB = 23,770 lbs (matches published specs)
  - T/W ratio at SL static AB, 2 engines, 36,000 lbs clean weight: 1.32 (correct)
  - Thrust at M1.5/40,000 ft closely matches previous model which was tuned
    against TO-1F-15A-1 Appendix B figure B9-21 (level flight acceleration,
    gross weight 40,000 lbs, page B9-26)
  - Smooth monotonic thrust increase with Mach (no anomalous subsonic spikes)
  - Altitude lapse consistent with standard atmosphere pressure ratios

  History
  =======
  2014-12-13  RJH  Initial version based on NASA TM-86042 tables normalised
  2019-10-24  RJH  Tuned Mil and Max power using TO-1F-15A-1 APP B PERF DATA
                   F100-PW-220; figure B9-21 Level Flight Acceleration GW 40,000lbs
  2026-03-06  RJH  Complete rework of thrust tables:
                   - Normalised tables so M0/SL produces rated static thrust
                     (previous tables produced only 70-77% of rated thrust)
                   - Replaced empirical curve-fit with corrected-thrust
                     thermodynamic model including engine limiting
                   - Fixed unrealistic M0.25 thrust spike (was 185% of rated)
                   - Gave AugThrust its own distinct table shape (previously
                     Mil and Aug tables had inconsistent shapes giving erratic
                     AB/Mil ratios from 1.5x to 2.9x; now smooth 1.63-1.85x)
                   - Fixed bypass ratio from 0.63 to 0.36
                   - Maintained calibration at M1.5/40kft against flight manual

  References
  ==========
  [1] NASA TM-86042, "Time and Fuel Flight Path Optimization for an F-15
      Airplane with an Improved Engine," 1986
      https://ntrs.nasa.gov/api/citations/19860014116/downloads/19860014116.pdf

  [2] NASA TM-78849, "Altitude Calibration of an F100, S/N P680063,
      Turbofan Engine," 1978
      https://ntrs.nasa.gov/api/citations/19780015152/downloads/19780015152.pdf

  [3] TO-1F-15A-1, USAF Flight Manual F-15A/B/C/D, Appendix B Performance
      Data F100-PW-220 (figure B9-21, page B9-26)

  [4] USAF National Museum, "Pratt & Whitney F100-PW-220" fact sheet
      https://www.nationalmuseum.af.mil/Visit/Museum-Exhibits/Fact-Sheets/Display/Article/196437/pratt-whitney-f100-pw-220/

  [5] Smithsonian NASM, "Pratt & Whitney F100-PW-100 Turbofan Engine"
      https://airandspace.si.edu/collection-objects/pratt-whitney-f100-pw-100-turbofan-engine/nasm_A19900276000

  [6] Purdue University, "F100 Engine Family" specifications
      https://engineering.purdue.edu/~propulsi/propulsion/jets/tfans/f100.html

  [7] Prisacariu & Ciubotaru, "Aspect Regarding of the Pratt & Whitney F100
      Jet Engine Performances," AFASES 2017
      DOI: 10.19062/2247-3173.2017.19.1.20

  [8] JSBSim FGTurbine.cpp thrust calculation source code
      https://github.com/JSBSim-Team/jsbsim/blob/master/src/models/propulsion/FGTurbine.cpp

  [9] NASA TM-104326, "Flight and Static Exhaust Flow Properties of an
      F110-GE-129 Engine in an F-16XL Airplane During Acoustic Tests,"
      Holzman, Webb, Burcham, 1996

  [10] NASA TM-102409, "Real-Time Simulation of an F110/STOVL Turbofan
       Engine," Drummond & Ouzts, 1989
-->

<turbine_engine name="F100-PW-220">

    <milthrust> 14590 </milthrust>
    <maxthrust> 23770 </maxthrust>
    <bypassratio>     0.36 </bypassratio>
    <tsfc>            0.73 </tsfc>
    <atsfc>           1.94 </atsfc>
    <bleed>           0.03 </bleed>
    <idlen1>         30.0 </idlen1>
    <idlen2>         60.0 </idlen2>
    <maxn1>         100.0 </maxn1>
    <maxn2>         100.0 </maxn2>
    <augmented>         1 </augmented>
    <augmethod>         2 </augmethod>
    <!-- acceleration from 0 -> 15% (at which point the start logic takes over in FGTurbine using 1.2 and 2.0 for N1/N2 acceleration rate) -->
    <n1spinup>1</n1spinup>
    <n2spinup>3</n2spinup>

    <injected>          0 </injected>

    <!--
        IdleThrust: fraction of milthrust produced at idle power setting.
        Scales with ram effect (Mach) and air density (altitude).
        Values are small (~2-7% of milthrust) as expected for idle.
    -->
    <function name="IdleThrust">
        <table>
            <independentVar lookup="row">velocities/mach</independentVar>
            <independentVar lookup="column">atmosphere/density-altitude</independentVar>
            <tableData>
                         0      5000    10000    15000    20000    25000    30000    35000    40000    45000    50000    55000    60000    65000    70000    75000    75459
                0.000  0.029   0.025   0.021   0.018   0.015   0.013   0.011   0.009   0.007   0.005   0.004   0.003   0.003   0.002   0.002   0.001   0
                0.200  0.029   0.025   0.021   0.018   0.015   0.013   0.011   0.009   0.007   0.005   0.004   0.003   0.003   0.002   0.002   0.001   0
                0.400  0.035   0.030   0.025   0.021   0.018   0.015   0.013   0.010   0.008   0.006   0.005   0.004   0.003   0.003   0.002   0.001   0
                0.600  0.043   0.037   0.031   0.027   0.023   0.019   0.016   0.013   0.010   0.008   0.006   0.005   0.004   0.003   0.002   0.002   0
                0.800  0.055   0.047   0.040   0.034   0.029   0.024   0.020   0.016   0.013   0.010   0.008   0.006   0.005   0.004   0.003   0.002   0
                0.900  0.060   0.052   0.044   0.038   0.032   0.027   0.022   0.018   0.015   0.011   0.009   0.007   0.006   0.005   0.004   0.003   0
                1.000  0.066   0.057   0.049   0.041   0.035   0.029   0.024   0.020   0.016   0.012   0.010   0.008   0.006   0.005   0.004   0.003   0
                1.200  0.066   0.057   0.049   0.041   0.035   0.029   0.024   0.020   0.016   0.012   0.010   0.008   0.006   0.005   0.004   0.003   0
                1.800  0.066   0.057   0.049   0.041   0.035   0.029   0.024   0.020   0.016   0.012   0.010   0.008   0.006   0.005   0.004   0.003   0
                2.500  0.066   0.057   0.049   0.041   0.035   0.029   0.024   0.020   0.016   0.012   0.010   0.008   0.006   0.005   0.004   0.003   0
            </tableData>
        </table>
    </function>

    <!--
        MilThrust: multiplier applied to (milthrust_scalar - idle_thrust).
        Final mil thrust = idle + (milthrust - idle) * MilTable(mach, alt).
        Normalised so that M0/SL = 1.0 gives rated 14,590 lbs.
        Based on corrected-thrust model: T/T_SLS ~ Pt2/sqrt(Tt2) with
        engine limiting above corrected thrust ratio of ~1.45.
    -->
    <function name="MilThrust">
        <table>
            <independentVar lookup="row">velocities/mach</independentVar>
            <independentVar lookup="column">atmosphere/density-altitude</independentVar>
            <tableData>
                         0       10000    20000    30000    40000    50000    60000    70000    75459
                0.00   1.0000   0.7126   0.4948   0.3333   0.2135   0.1320   0.0816   0.0505   0.0388
                0.20   1.0242   0.7299   0.5068   0.3414   0.2186   0.1352   0.0836   0.0517   0.0398
                0.40   1.0991   0.7833   0.5439   0.3664   0.2346   0.1451   0.0897   0.0555   0.0427
                0.60   1.2319   0.8779   0.6096   0.4106   0.2630   0.1626   0.1006   0.0622   0.0478
                0.80   1.4096   1.0228   0.7102   0.4784   0.3064   0.1895   0.1172   0.0724   0.0557
                0.90   1.4199   1.1181   0.7764   0.5230   0.3349   0.2071   0.1281   0.0792   0.0609
                1.00   1.4330   1.2314   0.8551   0.5760   0.3689   0.2281   0.1410   0.0872   0.0671
                1.20   1.4675   1.4004   1.0483   0.7061   0.4522   0.2796   0.1729   0.1069   0.0822
                1.40   1.5183   1.4295   1.3056   0.8795   0.5633   0.3483   0.2154   0.1332   0.1024
                1.60   1.5916   1.4740   1.3923   1.1088   0.7102   0.4391   0.2715   0.1679   0.1291
                1.80   1.6948   1.5391   1.4288   1.3557   0.9025   0.5580   0.3451   0.2134   0.1641
                2.00   1.8363   1.6309   1.4833   1.3829   1.1516   0.7121   0.4403   0.2723   0.2094
                2.20   2.0260   1.7567   1.5610   1.4252   1.3212   0.9096   0.5625   0.3478   0.2675
                2.50   2.4261   2.0273   1.7337   1.5258   1.3682   1.2471   0.8092   0.5004   0.3849
            </tableData>
        </table>
    </function>

    <!--
        AugThrust: multiplier applied directly to maxthrust_scalar.
        Final AB thrust = maxthrust * AugTable(mach, alt).
        Normalised so that M0/SL = 1.0 gives rated 23,770 lbs.
        Based on corrected-thrust model: T/T_SLS ~ Pt2/Tt2^0.35 with
        engine limiting above corrected thrust ratio of ~1.55.
        AB is less inlet-temperature-sensitive than mil power because the
        afterburner adds a near-constant enthalpy rise to the exhaust.
        AB/Mil ratio progresses smoothly from 1.63 (static) to ~1.85 (M2.5).
    -->
    <function name="AugThrust">
        <table>
            <independentVar lookup="row">velocities/mach</independentVar>
            <independentVar lookup="column">atmosphere/density-altitude</independentVar>
            <tableData>
                         0       10000    20000    30000    40000    50000    60000    70000    75459
                0.00   1.0000   0.7051   0.4840   0.3220   0.2045   0.1265   0.0782   0.0484   0.0372
                0.20   1.0254   0.7230   0.4963   0.3301   0.2097   0.1297   0.0802   0.0496   0.0381
                0.40   1.1043   0.7786   0.5344   0.3556   0.2259   0.1397   0.0864   0.0534   0.0411
                0.60   1.2448   0.8777   0.6025   0.4008   0.2546   0.1574   0.0974   0.0602   0.0463
                0.80   1.4614   1.0304   0.7073   0.4705   0.2989   0.1848   0.1143   0.0707   0.0544
                1.00   1.5536   1.2521   0.8595   0.5718   0.3632   0.2246   0.1389   0.0859   0.0661
                1.20   1.6144   1.5133   1.0649   0.7085   0.4501   0.2783   0.1721   0.1064   0.0819
                1.40   1.6995   1.5688   1.3419   0.8927   0.5671   0.3507   0.2168   0.1341   0.1031
                1.60   1.8174   1.6469   1.5239   1.1396   0.7239   0.4477   0.2768   0.1712   0.1317
                1.80   1.9786   1.7549   1.5924   1.4670   0.9320   0.5763   0.3563   0.2203   0.1695
                2.00   2.1954   1.9017   1.6870   1.5357   1.2051   0.7452   0.4608   0.2849   0.2192
                2.20   2.4828   2.0979   1.8151   1.6142   1.4665   0.9647   0.5965   0.3689   0.2837
                2.50   3.0856   2.5126   2.0892   1.7858   1.5637   1.4064   0.8756   0.5414   0.4165
            </tableData>
        </table>
    </function>

</turbine_engine>
